# OpenSim document version 30000
InverseKinematicsTool subject01:
  results_directory: ./
  model_file: C:\Users\adpatrick\Downloads\KSexamplefromOpenSim4.0-latest\KS-example-from-OpenSim4.0\KS-example\scaled_weighted_matlab.osim
  constraint_weight: Infinity
  accuracy: 1e-5
  marker_file: C:\Users\adpatrick\Downloads\KSexamplefromOpenSim4.0-latest\KS-example-from-OpenSim4.0\KS-example\new_S03_PostRun_0006_clean.trc
  time_range: 0 100
  report_errors: true
  timeScale: 20
  order: 4
  sdProcess: 15
  sdMeas: 0.003
  use_visualizer: false
  output_motion_file: C:\Users\adpatrick\Downloads\KSexamplefromOpenSim4.0-latest\KS-example-from-OpenSim4.0\KS-example\KS_RES.mot
  IKTaskSet gait2354_KS:
    IKMarkerTask STERNUM: apply=true weight=1.5
    IKMarkerTask C7: apply=true weight=1.5
    IKMarkerTask RGH: apply=true weight=0.8
    IKMarkerTask LGH: apply=true weight=0.8
    IKMarkerTask RFRONTAL: apply=false weight=0.8
    IKMarkerTask LFRONTAL: apply=false weight=0.8
    IKMarkerTask ROCCIPUT: apply=false weight=0.8
    IKMarkerTask LOCCIPUT: apply=false weight=0.8
    IKMarkerTask RASIS: apply=true weight=1
    IKMarkerTask LASIS: apply=true weight=1
    IKMarkerTask RPSIS: apply=true weight=1
    IKMarkerTask LPSIS: apply=true weight=1
    IKMarkerTask V_MidPnt_SIAS: apply=false weight=0.4
    IKMarkerTask V_MidPnt_SIPS: apply=false weight=0.4
    IKMarkerTask V_MidPnt_Pelvis: apply=false weight=0.4
    IKMarkerTask V_Right_Hip: apply=false weight=0.4
    IKMarkerTask RAT: apply=true weight=0.8
    IKMarkerTask RLT: apply=true weight=0.8
    IKMarkerTask RDAT: apply=true weight=0.8
    IKMarkerTask V_MidPnt_R_Knee: apply=false weight=0.4
    IKMarkerTask RTT: apply=true weight=0.8
    IKMarkerTask RFH: apply=true weight=1.5
    IKMarkerTask RT: apply=true weight=0.8
    IKMarkerTask RF: apply=true weight=0.8
    IKMarkerTask V_MidPnt_R_Mal: apply=false weight=0.4
    IKMarkerTask RMC: apply=true weight=1.5
    IKMarkerTask RMEDC: apply=true weight=1.5
    IKMarkerTask RLC: apply=true weight=1.5
    IKMarkerTask R5MT: apply=true weight=0.8
    IKMarkerTask R1MT: apply=true weight=0.8
    IKMarkerTask V_Left_Hip: apply=false weight=0.4
    IKMarkerTask LAT: apply=true weight=0.8
    IKMarkerTask LLT: apply=true weight=0.8
    IKMarkerTask LDAT: apply=true weight=0.8
    IKMarkerTask V_MidPnt_L_Knee: apply=false weight=0.4
    IKMarkerTask LTT: apply=true weight=0.8
    IKMarkerTask LFH: apply=true weight=1.5
    IKMarkerTask LT: apply=true weight=0.8
    IKMarkerTask LF: apply=true weight=0.8
    IKMarkerTask V_MidPnt_L_Mal: apply=false weight=0.4
    IKMarkerTask LMC: apply=true weight=1.5
    IKMarkerTask LMEDC: apply=true weight=1.5
    IKMarkerTask LLC: apply=true weight=1.5
    IKMarkerTask L5MT: apply=true weight=0.8
    IKMarkerTask L1MT: apply=true weight=0.8
    IKMarkerTask T6: apply=true weight=1
    IKMarkerTask LELBOW: apply=true weight=0.1
    IKMarkerTask LWRIST: apply=true weight=0.1
    IKMarkerTask RELBOW: apply=true weight=0.1
    IKMarkerTask RWRIST: apply=true weight=0.1
