# OpenSim document version 40000
InverseKinematicsTool FS_Testing_90degreecut03:
  results_directory: C:\Users\adpatrick\OneDrive - nih.no\Desktop\ScanFolder
  constraint_weight: Inf
  accuracy: 1e-5
  time_range: 0 0.63
  output_motion_file: IK_RESULTS_FS_Testing_90degreecut03.mot
  report_errors: true
  marker_file: FS_Testing_90degreecut03.trc
  report_marker_locations: true
  IKTaskSet:
    IKMarkerTask LA1: apply=true weight=50
    IKMarkerTask LA2: apply=true weight=50
    IKMarkerTask LA3: apply=true weight=50
    IKMarkerTask RA1: apply=true weight=50
    IKMarkerTask RA2: apply=true weight=50
    IKMarkerTask RA3: apply=true weight=50
    IKMarkerTask RFORE1: apply=true weight=50
    IKMarkerTask RFORE2: apply=true weight=50
    IKMarkerTask RFORE3: apply=true weight=50
    IKMarkerTask LFORE1: apply=true weight=50
    IKMarkerTask LFORE2: apply=true weight=50
    IKMarkerTask LFORE3: apply=true weight=50
    IKMarkerTask STERNUM: apply=true weight=25
    IKMarkerTask C7: apply=true weight=25
    IKMarkerTask RGH: apply=true weight=25
    IKMarkerTask LGH: apply=true weight=25
    IKMarkerTask RFRONTAL: apply=false weight=50
    IKMarkerTask LFRONTAL: apply=false weight=50
    IKMarkerTask ROCCIPUT: apply=false weight=50
    IKMarkerTask LOCCIPUT: apply=false weight=50
    IKMarkerTask RASIS: apply=true weight=40
    IKMarkerTask LASIS: apply=true weight=40
    IKMarkerTask RPSIS: apply=true weight=40
    IKMarkerTask LPSIS: apply=true weight=40
    IKMarkerTask V_MidPnt_SIAS: apply=false weight=10
    IKMarkerTask V_MidPnt_SIPS: apply=false weight=10
    IKMarkerTask V_MidPnt_Pelvis: apply=false weight=10
    IKMarkerTask V_Right_Hip: apply=false weight=10
    IKMarkerTask RAT: apply=true weight=100
    IKMarkerTask RLT: apply=true weight=100
    IKMarkerTask RDAT: apply=true weight=100
    IKMarkerTask V_MidPnt_R_Knee: apply=false weight=10
    IKMarkerTask RTT: apply=true weight=100
    IKMarkerTask RFH: apply=true weight=100
    IKMarkerTask RT: apply=true weight=100
    IKMarkerTask RF: apply=true weight=100
    IKMarkerTask V_MidPnt_R_Mal: apply=false weight=10
    IKMarkerTask RMC: apply=true weight=50
    IKMarkerTask RMEDC: apply=true weight=50
    IKMarkerTask RLC: apply=true weight=50
    IKMarkerTask R5MTP: apply=true weight=50
    IKMarkerTask R1MTP: apply=true weight=50
    IKMarkerTask V_Left_Hip: apply=false weight=10
    IKMarkerTask LAT: apply=true weight=100
    IKMarkerTask LLT: apply=true weight=100
    IKMarkerTask LDAT: apply=true weight=100
    IKMarkerTask V_MidPnt_L_Knee: apply=false weight=10
    IKMarkerTask LTT: apply=true weight=100
    IKMarkerTask LFH: apply=true weight=100
    IKMarkerTask LT: apply=true weight=100
    IKMarkerTask LF: apply=true weight=100
    IKMarkerTask V_MidPnt_L_Mal: apply=false weight=10
    IKMarkerTask LMC: apply=true weight=50
    IKMarkerTask LMEDC: apply=true weight=50
    IKMarkerTask LLC: apply=true weight=50
    IKMarkerTask L5MTP: apply=true weight=50
    IKMarkerTask L1MTP: apply=true weight=50
    IKMarkerTask T6: apply=true weight=25
    IKMarkerTask LELBOW: apply=false weight=50
    IKMarkerTask LWRIST: apply=false weight=50
    IKMarkerTask RELBOW: apply=false weight=50
    IKMarkerTask RWRIST: apply=false weight=50
    IKMarkerTask XYPHOID: apply=true weight=25
    IKMarkerTask RT3: apply=true weight=100
    IKMarkerTask LT3: apply=true weight=100
    IKMarkerTask toe_right: apply=true weight=50
    IKMarkerTask toe_left: apply=true weight=50
