# OpenSim document version 40000
InverseKinematicsTool Participant_101_90degreecut01_r:
  results_directory: C:\Users\adpatrick\Downloads\Calgary_Data_all\Right\P101
  constraint_weight: Inf
  accuracy: 1e-5
  time_range: 0 0.4875
  output_motion_file: C:\Users\adpatrick\OneDrive - nih.no\Desktop\ScalingTest\IK_RES
  report_errors: true
  marker_file: Participant_101_90degreecut01_r.trc
  report_marker_locations: true
  IKTaskSet:
    IKMarkerTask STERNUM: apply=true weight=25
    IKMarkerTask C7: apply=true weight=25
    IKMarkerTask RGH: apply=true weight=25
    IKMarkerTask LGH: apply=true weight=25
    IKMarkerTask RFRONTAL: apply=false weight=50
    IKMarkerTask LFRONTAL: apply=false weight=50
    IKMarkerTask ROCCIPUT: apply=false weight=50
    IKMarkerTask LOCCIPUT: apply=false weight=50
    IKMarkerTask RASIS: apply=true weight=40
    IKMarkerTask LASIS: apply=true weight=40
    IKMarkerTask RPSIS: apply=true weight=40
    IKMarkerTask LPSIS: apply=true weight=40
    IKMarkerTask V_MidPnt_SIAS: apply=false weight=10
    IKMarkerTask V_MidPnt_SIPS: apply=false weight=10
    IKMarkerTask V_MidPnt_Pelvis: apply=false weight=10
    IKMarkerTask V_Right_Hip: apply=false weight=10
    IKMarkerTask RAT: apply=true weight=100
    IKMarkerTask RLT: apply=true weight=100
    IKMarkerTask RDAT: apply=true weight=100
    IKMarkerTask V_MidPnt_R_Knee: apply=false weight=10
    IKMarkerTask RTT: apply=true weight=100
    IKMarkerTask RFH: apply=true weight=100
    IKMarkerTask RT: apply=true weight=100
    IKMarkerTask RF: apply=true weight=100
    IKMarkerTask V_MidPnt_R_Mal: apply=false weight=10
    IKMarkerTask RMC: apply=true weight=50
    IKMarkerTask RMEDC: apply=true weight=50
    IKMarkerTask RLC: apply=true weight=50
    IKMarkerTask R5MT: apply=true weight=50
    IKMarkerTask R1MT: apply=true weight=50
    IKMarkerTask V_Left_Hip: apply=false weight=10
    IKMarkerTask LAT: apply=true weight=100
    IKMarkerTask LLT: apply=true weight=100
    IKMarkerTask LDAT: apply=true weight=100
    IKMarkerTask V_MidPnt_L_Knee: apply=false weight=10
    IKMarkerTask LTT: apply=true weight=100
    IKMarkerTask LFH: apply=true weight=100
    IKMarkerTask LT: apply=true weight=100
    IKMarkerTask LF: apply=true weight=100
    IKMarkerTask V_MidPnt_L_Mal: apply=false weight=10
    IKMarkerTask LMC: apply=true weight=50
    IKMarkerTask LMEDC: apply=true weight=50
    IKMarkerTask LLC: apply=true weight=50
    IKMarkerTask L5MT: apply=true weight=50
    IKMarkerTask L1MT: apply=true weight=50
    IKMarkerTask T6: apply=true weight=25
    IKMarkerTask LELBOW: apply=true weight=50
    IKMarkerTask LWRIST: apply=true weight=50
    IKMarkerTask RELBOW: apply=true weight=50
    IKMarkerTask RWRIST: apply=true weight=50
