# OpenSim document version 40000
MarkerSet:
  Marker STERNUM: torso (0.04454836 0.3694015 0)
  Marker C7: torso (-0.07284298 0.4133403 0)
  Marker RGH: torso (0.001392189 0.4121958 0.1411453) fixed=true
  Marker LGH: torso (0 0.4145424 -0.140844) fixed=true
  Marker RFRONTAL: torso (0.073 0.61 0.05) fixed=true
  Marker LFRONTAL: torso (0.073 0.61 -0.05) fixed=true
  Marker ROCCIPUT: torso (-0.0725 0.58 0.05) fixed=true
  Marker LOCCIPUT: torso (-0.0725 0.58 -0.05) fixed=true
  Marker RASIS: pelvis (0.01 0.01 0.124)
  Marker LASIS: pelvis (0.01 0.01 -0.124)
  Marker RPSIS: pelvis (-0.153551 0.042 0.0450304)
  Marker LPSIS: pelvis (-0.153551 0.042 -0.0450304)
  Marker V_MidPnt_SIAS: pelvis (0.01 0.01 0) fixed=true
  Marker V_MidPnt_SIPS: pelvis (-0.153551 0.042 0) fixed=true
  Marker V_MidPnt_Pelvis: pelvis (-0.07 0.026 0) fixed=true
  Marker V_MidPnt_Hip: pelvis (-0.0707 -0.0661 0) fixed=true
  Marker V_Right_Hip: femur_r_offset (0 0 0) fixed=true
  Marker RAT: femur_r (0.065 -0.17 0.02010354)
  Marker RLT: femur_r (-0.001339499 -0.17 0.064)
  Marker RDAT: femur_r (0.065 -0.2763417 0.01861815)
  Marker RLE: femur_r (0 -0.404 0.05)
  Marker RME: femur_r (0 -0.404 -0.05)
  Marker V_MidPnt_R_Knee: femur_r (0 -0.404 0) fixed=true
  Marker RTT: tibia_r (0.05157355 -0.0696878 0.01040162) fixed=true
  Marker RFH: tibia_r (-0.005172749 -0.07788924 0.05876522) fixed=true
  Marker RT: tibia_r (0.02099833 -0.2809902 -0.002290133)
  Marker RF: tibia_r (-0.006193534 -0.2152085 0.05000016)
  Marker RLM: tibia_r (-0.005001365 -0.4123539 0.05251917)
  Marker RMM: tibia_r (0.005999141 -0.4007406 -0.03369893)
  Marker V_MidPnt_R_Mal: tibia_r (0.0005 -0.4065 0.006050714) fixed=true
  Marker RMC: calcn_r (-0.01999989 0.01899999 -0.007109428)
  Marker RMEDC: calcn_r (0.0175461 0.025 -0.0388165)
  Marker RLC: calcn_r (0.0221 0.025 0.0307541)
  Marker R5MT: calcn_r (0.1461674 0.005473053 0.05541743)
  Marker R1MT: calcn_r (0.1815791 0.01841876 -0.02819538)
  Marker V_Left_Hip: femur_l_offset (0 0 0) fixed=true
  Marker LAT: femur_l (0.065 -0.17 -0.01860756)
  Marker LLT: femur_l (0.01283517 -0.17 -0.05601023)
  Marker LDAT: femur_l (0.065 -0.2697119 -0.01160566)
  Marker LLE: femur_l (0 -0.404 -0.05)
  Marker LME: femur_l (0 -0.404 0.05)
  Marker V_MidPnt_L_Knee: femur_l (0 -0.404 0) fixed=true
  Marker LTT: tibia_l (0.04980585 -0.07203588 -0.008237422) fixed=true
  Marker LFH: tibia_l (-0.007968004 -0.07451847 -0.05947771) fixed=true
  Marker LT: tibia_l (0.02764694 -0.2814855 -0.005830479)
  Marker LF: tibia_l (-0.009428166 -0.2117921 -0.0500001)
  Marker LLM: tibia_l (-0.005001362 -0.4166994 -0.05269914)
  Marker LMM: tibia_l (0.00599926 -0.4022926 0.03241183)
  Marker V_MidPnt_L_Mal: tibia_l (0.0005 -0.4095 -0.008361141) fixed=true
  Marker LMC: calcn_l (-0.01999993 0.01899999 0.004396022)
  Marker LMEDC: calcn_l (0.01754608 0.025 0.0388165)
  Marker LLC: calcn_l (0.0221 0.025 -0.03075407)
  Marker L5MT: calcn_l (0.146167 0.0140679 -0.0555596)
  Marker L1MT: calcn_l (0.181579 0.0184188 0.02634877) fixed=true
  Marker T6: torso (-0.1087639 0.2727872 0.001067296)
  Marker V_MidPnt_L_MTP: calcn_l (0.1641151 0.02116895 -0.01339401) fixed=true
  Marker V_MidPnt_R_MTP: calcn_r (0.164172 0.01466603 0.008775961) fixed=true
  Marker V_TopHead: torso (-0.002744698 0.6438315 0.0001669544) fixed=true
  Marker LELBOW: humerus_l (0.01117064 -0.285072 0.04013014) fixed=true
  Marker LWRIST: ulna_l (-0.02078975 -0.236309 -0.005995959) fixed=true
  Marker RELBOW: humerus_r (0.006461403 -0.2820903 -0.04247613) fixed=true
  Marker RWRIST: ulna_r (-0.02025258 -0.2356973 0.006808432) fixed=true
