# OpenSim document version 40000
ScaleTool P101:
  mass: 57 [kg]
  height: 570
  age: -1
  GenericModelMaker:
    marker_set_file: markerset.xml
  ModelScaler:
    apply: true
    scaling_order: measurements
    marker_file: P001_Static_Anatomical1_rot.trc
    time_range: 0 1.83
    preserve_mass_distribution: true
    output_model_file: scaled_matlab.osim
    output_scale_file: scaleSet_applied.xml
    MeasurementSet:
      Measurement pelvis_x: apply=true
        MarkerPair: markers=(V_MidPnt_SIAS V_MidPnt_SIPS)
        BodyScale pelvis: axes=X
      Measurement pelvis_y: apply=true
        MarkerPair: markers=(V_Left_Hip V_MidPnt_Pelvis)
        MarkerPair: markers=(V_Right_Hip V_MidPnt_Pelvis)
        BodyScale pelvis: axes=Y
      Measurement pelvis_z: apply=true
        MarkerPair: markers=(V_Right_Hip V_Left_Hip)
        BodyScale pelvis: axes=Z
      Measurement torso: apply=false
        MarkerPair: markers=(V_MidPnt_Pelvis C_7)
        MarkerPair: markers=(C_7 sternum)
      Measurement thight_right: apply=true
        MarkerPair: markers=(V_Right_Hip V_MidPnt_R_Knee)
        BodyScale femur_r: axes=(X Y Z)
        BodyScale patella_r: axes=(X Y Z)
      Measurement thight_left: apply=true
        MarkerPair: markers=(V_Left_Hip V_MidPnt_L_Knee)
        BodyScale femur_l: axes=(X Y Z)
        BodyScale patella_l: axes=(X Y Z)
      Measurement shank_left: apply=true
        MarkerPair: markers=(V_MidPnt_L_Knee V_MidPnt_L_Mal)
        BodyScale tibia_l: axes=(X Y Z)
      Measurement shank_right: apply=true
        MarkerPair: markers=(V_MidPnt_R_Knee V_MidPnt_R_Mal)
        BodyScale tibia_r: axes=(X Y Z)
      Measurement foot_r: apply=true
        MarkerPair: markers=(calc_back_right V_MidPnt_R_MTP)
        BodyScale talus_r: axes=(X Y Z)
      Measurement foot_l: apply=true
        MarkerPair: markers=(calc_back_left V_MidPnt_L_MTP)
        BodyScale talus_l: axes=(X Y Z)
      Measurement humuerus_r: apply=true
        MarkerPair: markers=(acrom_right elbow_top_right)
        BodyScale humerus_r: axes=(X Y Z)
      Measurement lowerarm_r: apply=true
        MarkerPair: markers=(elbow_top_right hand_med_right)
        BodyScale ulna_r: axes=(X Y Z)
        BodyScale radius_r: axes=(X Y Z)
        BodyScale hand_r: axes=(X Y Z)
      Measurement humerus_l: apply=true
        MarkerPair: markers=(acrom_left elbow_top_left)
        BodyScale humerus_l: axes=(X Y Z)
      Measurement lowerarm_l: apply=true
        MarkerPair: markers=(elbow_top_left hand_med_left)
        BodyScale ulna_l: axes=(X Y Z)
        BodyScale radius_l: axes=(X Y Z)
        BodyScale hand_l: axes=(X Y Z)
      Measurement foot_r_x: apply=true
        MarkerPair: markers=(Pro_MidPnt_R_Mal Pro_MidPnt_R_MTP)
        BodyScale calcn_r: axes=X
        BodyScale toes_r: axes=X
      Measurement foot_r_y: apply=true
        MarkerPair: markers=(Pro_MidPnt_R_Mal V_MidPnt_R_Mal)
        BodyScale calcn_r: axes=Y
        BodyScale toes_r: axes=Y
      Measurement foot_r_z: apply=true
        MarkerPair: markers=(V_forfoot_lat_right V_forfoot_med_right)
        BodyScale calcn_r: axes=Z
        BodyScale toes_r: axes=Z
      Measurement foot_l_x: apply=true
        MarkerPair: markers=(Pro_MidPnt_L_Mal Pro_MidPnt_L_MTP)
        BodyScale calcn_l: axes=X
        BodyScale toes_l: axes=X
      Measurement foot_l_y: apply=true
        MarkerPair: markers=(Pro_MidPnt_L_Mal V_MidPnt_L_Mal)
        BodyScale calcn_l: axes=Y
        BodyScale toes_l: axes=Y
      Measurement foot_l_z: apply=true
        MarkerPair: markers=(V_forefoot_med_left V_forefoot_lat_left)
        BodyScale calcn_l: axes=Z
        BodyScale toes_l: axes=Z
      Measurement torso_x: apply=true
        MarkerPair: markers=(V_MidPnt_SIAS V_MidPnt_SIPS)
        BodyScale torso: axes=X
      Measurement torso_y: apply=true
        MarkerPair: markers=(V_MidPnt_Pelvis C_7)
        BodyScale torso: axes=Y
      Measurement torso_z: apply=true
        MarkerPair: markers=(acrom_right acrom_left)
        BodyScale torso: axes=Z
  MarkerPlacer:
    apply: true
    marker_file: P001_Static_Anatomical1_rot.trc
    time_range: 0 1.83
    output_motion_file: static_output.mot
    output_model_file: scaled_weighted_matlab.osim
    output_marker_file: MarkerSet_after_scale.xml
    max_marker_movement: -1
    IKTaskSet:
      IKMarkerTask sternum: apply=true weight=50
      IKMarkerTask C_7: apply=false weight=20
      IKMarkerTask acrom_right: apply=true weight=10
      IKMarkerTask acrom_left: apply=true weight=10
      IKMarkerTask SIAS_right: apply=true weight=50
      IKMarkerTask SIAS_left: apply=true weight=50
      IKMarkerTask SIPS_right: apply=true weight=50
      IKMarkerTask SIPS_left: apply=true weight=50
      IKMarkerTask V_MidPnt_SIAS: apply=true weight=200
      IKMarkerTask V_MidPnt_SIPS: apply=true weight=200
      IKMarkerTask V_MidPnt_Pelvis: apply=true weight=200
      IKMarkerTask V_MidPnt_Hip: apply=true weight=200
      IKMarkerTask V_Right_Hip: apply=true weight=200
      IKMarkerTask epi_lat_right: apply=true weight=50
      IKMarkerTask epi_med_right: apply=true weight=50
      IKMarkerTask V_MidPnt_R_Knee: apply=true weight=200
      IKMarkerTask mal_lat_right: apply=true weight=50
      IKMarkerTask mal_med_right: apply=true weight=50
      IKMarkerTask V_MidPnt_R_Mal: apply=true weight=200
      IKMarkerTask V_Left_Hip: apply=true weight=200
      IKMarkerTask epi_lat_left: apply=true weight=50
      IKMarkerTask epi_med_left: apply=true weight=50
      IKMarkerTask V_MidPnt_L_Knee: apply=true weight=200
      IKMarkerTask mal_lat_left: apply=true weight=50
      IKMarkerTask mal_med_left: apply=true weight=50
      IKMarkerTask V_MidPnt_L_Mal: apply=true weight=200
      IKMarkerTask elbow_top_left: apply=true weight=20
      IKMarkerTask elbow_top_right: apply=true weight=20
      IKMarkerTask hand_top_right: apply=true weight=20
      IKMarkerTask hand_top_left: apply=true weight=20
      IKMarkerTask hand_med_right: apply=true weight=20
      IKMarkerTask hand_lat_right: apply=true weight=20
      IKMarkerTask hand_med_left: apply=true weight=20
      IKMarkerTask hand_lat_left: apply=true weight=20
      IKMarkerTask B_10: apply=false weight=20
      IKMarkerTask shoulder_left: apply=true weight=20
      IKMarkerTask shoulder_right: apply=true weight=20
