# OpenSim document version 40000
MarkerSet:
  Marker V_Top_Head: pelvis (-0.07 0.7390626 0)
  Marker sternum: torso (0.098 0.223 0)
  Marker C_7: torso (-0.07560602 0.4391478 0)
  Marker acrom_right: torso (0 0.4248252 0.1435492)
  Marker acrom_left: torso (0 0.4256052 -0.1416979)
  Marker head_front_right: torso (0.073 0.61 0.05)
  Marker head_front_left: torso (0.073 0.61 -0.05)
  Marker head_back_right: torso (-0.0725 0.58 0.05)
  Marker head_back_left: torso (-0.0725 0.58 -0.05)
  Marker ear_right: torso (0.02222856 0.556104 0.07559505)
  Marker ear_left: torso (0.0222286 0.556104 -0.075595)
  Marker SIAS_right: pelvis (0.01 0.01 0.124)
  Marker SIAS_left: pelvis (0.01 0.01 -0.124)
  Marker SIPS_right: pelvis (-0.153551 0.042 0.0450304)
  Marker SIPS_left: pelvis (-0.153551 0.042 -0.0450304)
  Marker V_MidPnt_SIAS: pelvis (0.01 0.01 0) fixed=true
  Marker V_MidPnt_SIPS: pelvis (-0.153551 0.042 0) fixed=true
  Marker V_MidPnt_Pelvis: pelvis (-0.07 0.026 0) fixed=true
  Marker V_MidPnt_Hip: pelvis (-0.0707 -0.0661 0) fixed=true
  Marker V_Right_Hip: femur_r_offset (0 0 0) fixed=true
  Marker cluster_femur_right_1: femur_r (0.065 -0.17 0.06)
  Marker cluster_femur_right_2: femur_r (-0.02 -0.17 0.064)
  Marker cluster_femur_right_3: femur_r (0.065 -0.32 0.06)
  Marker cluster_femur_right_4: femur_r (-0.021 -0.32 0.06)
  Marker epi_lat_right: femur_r (0 -0.404 0.05)
  Marker epi_med_right: femur_r (0 -0.404 -0.05)
  Marker V_MidPnt_R_Knee: femur_r (0 -0.404 0) fixed=true
  Marker cluster_tibia_right_1: tibia_r (0.029 -0.16 0.05)
  Marker cluster_tibia_right_2: tibia_r (-0.029 -0.16 0.05)
  Marker cluster_tibia_right_3: tibia_r (0.021 -0.33 0.05)
  Marker cluster_tibia_right_4: tibia_r (-0.029 -0.33 0.05)
  Marker mal_lat_right: tibia_r (-0.01621406 -0.3826057 0.1022081)
  Marker mal_med_right: tibia_r (0.005999385 -0.3828127 -0.038)
  Marker V_MidPnt_R_Mal: tibia_r (-0.004699882 -0.3848197 0.0005479481) fixed=true
  Marker calc_back_right: calcn_r (-0.02 0.019 0)
  Marker calc_med_right: calcn_r (0.0175461 0.025 -0.0388165)
  Marker calc_lat_right: calcn_r (0.0221 0.025 0.0307541)
  Marker forfoot_lat_right: calcn_r (0.1461674 0.01406789 0.05555957)
  Marker forfoot_med_right: calcn_r (0.1815791 0.01841876 -0.04630316)
  Marker toe_right: toes_r (0.0712 0.0115 -0.01708)
  Marker V_Left_Hip: femur_l_offset (0 0 0) fixed=true
  Marker cluster_femur_left_1: femur_l (0.065 -0.17 -0.06)
  Marker cluster_femur_left_2: femur_l (-0.02 -0.17 -0.064)
  Marker cluster_femur_left_3: femur_l (0.065 -0.32 -0.06)
  Marker cluster_femur_left_4: femur_l (-0.02 -0.32 -0.06)
  Marker epi_lat_left: femur_l (0 -0.404 -0.05)
  Marker epi_med_left: femur_l (0 -0.404 0.05)
  Marker V_MidPnt_L_Knee: femur_l (0 -0.404 0) fixed=true
  Marker cluster_tibia_left_1: tibia_l (0.029 -0.16 -0.05)
  Marker cluster_tibia_left_2: tibia_l (-0.029 -0.16 -0.05)
  Marker cluster_tibia_left_3: tibia_l (0.029 -0.33 -0.05)
  Marker cluster_tibia_left_4: tibia_l (-0.029 -0.33 -0.05)
  Marker mal_lat_left: tibia_l (-0.01815818 -0.382786 -0.0490295)
  Marker mal_med_left: tibia_l (0.005999904 -0.3849434 0.038)
  Marker V_MidPnt_L_Mal: tibia_l (-0.006095814 -0.3839506 -0.002698049) fixed=true
  Marker calc_back_left: calcn_l (-0.02 0.019 0)
  Marker calc_med_left: calcn_l (0.01754608 0.025 0.0388165)
  Marker calc_lat_left: calcn_l (0.0221 0.025 -0.03075407)
  Marker forefoot_lat_left: calcn_l (0.146167 0.0140679 -0.0555596)
  Marker forefoot_med_left: calcn_l (0.181579 0.0184188 0.0463032)
  Marker toe_left: toes_l (0.0712 0.0115 0.01708)
  Marker clav: torso (0.03314573 0.3830042 0)
  Marker elbow_med_left: humerus_l (0.006845126 -0.2752845 0.04299704)
  Marker elbow_lat_left: humerus_l (0.01191133 -0.277887 -0.03487058)
  Marker elbow_top_left: ulna_l (-0.04357479 0.006907849 -0.003624297)
  Marker elbow_med_right: humerus_r (0.00684513 -0.275284 -0.042997)
  Marker elbow_lat_right: humerus_r (0.0119113 -0.277887 0.0348706)
  Marker elbow_top_right: ulna_r (-0.04357474 0.006907412 0.003624296)
  Marker cluster_upperarm_left_1: humerus_l (-0.02163863 -0.1138126 -0.02623364)
  Marker cluster_upperarm_left_2: humerus_l (-0.0183912 -0.1946981 -0.02108236)
  Marker cluster_upperarm_left_3: humerus_l (0.03031351 -0.152525 -0.01840731)
  Marker cluster_upperarm_right_1: humerus_r (-0.0216386 -0.113813 0.0262336)
  Marker cluster_upperarm_right_2: humerus_r (-0.0183912 -0.194698 0.0210824)
  Marker cluster_upperarm_right_3: humerus_r (0.0303135 -0.152525 0.0184073)
  Marker cluster_lowerarm_right_1: radius_r (-0.02205119 -0.0727734 -0.0349809)
  Marker cluster_lowerarm_right_2: radius_r (-0.0208903 -0.1763615 -0.0151356)
  Marker cluster_lowerarm_right_3: radius_r (-0.02224794 -0.1008127 0.02481757)
  Marker cluster_lowerarm_left_1: radius_l (-0.0220512 -0.0727734 0.0349809)
  Marker cluster_lowerarm_left_2: radius_l (-0.0208903 -0.176361 0.0151356)
  Marker cluster_lowerarm_left_3: radius_l (-0.0222479 -0.100813 -0.0248176)
  Marker hand_top_right: hand_r (-0.01851005 -0.06881337 -0.0009603867)
  Marker hand_top_left: hand_l (-0.01851 -0.0688134 0.000960387)
  Marker hand_med_right: radius_r (-0.01153448 -0.230602 0.04526746)
  Marker hand_lat_right: ulna_r (-0.01706702 -0.2366694 0.007065941)
  Marker hand_med_left: radius_l (-0.0115345 -0.230602 -0.0452675)
  Marker hand_lat_left: ulna_l (-0.02278202 -0.2376292 -0.00539211)
  Marker B_10: torso (-0.08906658 0.1690436 0)
  Marker shoulder_left: humerus_l (0.006990025 -0.02801351 -0.02744981)
  Marker shoulder_right: humerus_r (0.00699003 -0.0280135 0.0274498)
  Marker V_MidPnt_L_MTP: calcn_l (0.1641151 0.02116895 -0.01339401) fixed=true
  Marker V_MidPnt_R_MTP: calcn_r (0.164172 0.01466603 0.008775961) fixed=true
  Marker V_mal_med_left: tibia_l (0.005998985 -0.4711035 0.0324118)
  Marker V_mal_lat_left: tibia_l (-0.00500162 -0.4726754 -0.0526991)
  Marker Pro_MidPnt_L_Mal: tibia_l (0.0004997195 -0.4704832 -0.00836114)
  Marker V_calc_back_left: calcn_l (-0.0199999 -0.02490143 0.00439602)
  Marker V_calc_med_left: calcn_l (0.01754586 -0.0280503 0.0388165)
  Marker V_calc_lat_left: calcn_l (0.0221 -0.02891095 -0.0307541)
  Marker Pro_MidPnt_L_MTP: calcn_l (0.164115 -0.0249013 -0.013394)
  Marker V_forefoot_lat_left: calcn_l (0.146167 -0.0249013 -0.05556)
  Marker V_forefoot_med_left: calcn_l (0.1815789 -0.0249013 0.04423843)
  Marker V_mal_med_right: tibia_r (0.005997783 -0.4683106 -0.03919494)
  Marker V_mal_lat_right: tibia_r (-0.012417 -0.464681 0.04634669)
  Marker Pro_MidPnt_R_Mal: tibia_r (0.0004987122 -0.4721846 0.0068604)
  Marker V_calc_back_right: calcn_r (-0.01999988 -0.02490143 -0.004117428)
  Marker V_calc_med_right: calcn_r (0.01754586 -0.0249013 -0.0400054)
  Marker V_calc_lat_right: calcn_r (0.04091555 -0.02490035 0.03452293)
  Marker Pro_MidPnt_R_MTP: calcn_r (0.164115 -0.0249013 0.01106744)
  Marker V_forfoot_lat_right: calcn_r (0.146167 -0.0249013 0.0568715)
  Marker V_forfoot_med_right: calcn_r (0.215304 -0.0248996 -0.04211566)
