# OpenSim document version 40000
ScaleTool P101:
  mass: 57 [kg]
  height: 570
  age: -1
  GenericModelMaker:
    marker_set_file: markerset.xml
  ModelScaler:
    apply: true
    scaling_order: measurements
    marker_file: Static.trc
    time_range: 0 3.73333
    preserve_mass_distribution: true
    output_model_file: C:/Users/adpatrick/OneDrive - nih.no/Desktop/ScalingTest/../../../Downloads/Calgary_Data_all/Right/P101/scaled_matlab.osim
    output_scale_file: C:/Users/adpatrick/OneDrive - nih.no/Desktop/ScalingTest/../../../Downloads/Calgary_Data_all/Right/P101/scaleSet_applied.xml
    MeasurementSet:
      Measurement pelvis_x: apply=true
        MarkerPair: markers=(V_MidPnt_SIAS V_MidPnt_SIPS)
        BodyScale pelvis: axes=X
      Measurement pelvis_y: apply=true
        MarkerPair: markers=(V_Left_Hip V_MidPnt_Pelvis)
        MarkerPair: markers=(V_Right_Hip V_MidPnt_Pelvis)
        BodyScale pelvis: axes=Y
      Measurement pelvis_z: apply=true
        MarkerPair: markers=(V_Right_Hip V_Left_Hip)
        BodyScale pelvis: axes=Z
      Measurement torso: apply=false
        MarkerPair: markers=(V_MidPnt_Pelvis C7)
        MarkerPair: markers=(C7 STERNUM)
      Measurement thight_right: apply=true
        MarkerPair: markers=(V_Right_Hip V_MidPnt_R_Knee)
        BodyScale femur_r: axes=(X Y Z)
        BodyScale sagittal_knee_body_r: axes=(X Y Z)
        BodyScale aux_intercond_body_r: axes=(X Y Z)
      Measurement thight_left: apply=true
        MarkerPair: markers=(V_Left_Hip V_MidPnt_L_Knee)
        BodyScale femur_l: axes=(X Y Z)
        BodyScale sagittal_knee_body_l: axes=(X Y Z)
        BodyScale aux_intercond_body_l: axes=(X Y Z)
      Measurement shank_left: apply=true
        MarkerPair: markers=(V_MidPnt_L_Knee V_MidPnt_L_Mal)
        BodyScale tibia_l: axes=(X Y Z)
      Measurement shank_right: apply=true
        MarkerPair: markers=(V_MidPnt_R_Knee V_MidPnt_R_Mal)
        BodyScale tibia_r: axes=(X Y Z)
      Measurement foot_r: apply=true
        MarkerPair: markers=(RMC V_MidPnt_R_MTP)
        BodyScale talus_r: axes=(X Y Z)
      Measurement foot_l: apply=true
        MarkerPair: markers=(LMC V_MidPnt_L_MTP)
        BodyScale talus_l: axes=(X Y Z)
      Measurement tight_r_z: apply=false
        MarkerPair: markers=(RME RLE)
      Measurement tight_l_z: apply=false
        MarkerPair: markers=(LLE LME)
      Measurement torso_y_new: apply=false
        MarkerPair: markers=(V_TopHead V_MidPnt_Hip)
      Measurement humuerus_r: apply=true
        MarkerPair: markers=(RGH RELBOW)
        BodyScale humerus_r: axes=(X Y Z)
      Measurement lowerarm_r: apply=true
        MarkerPair: markers=(RELBOW RWRIST)
        BodyScale ulna_r: axes=(X Y Z)
        BodyScale radius_r: axes=(X Y Z)
        BodyScale hand_r: axes=(X Y Z)
      Measurement humerus_l: apply=true
        MarkerPair: markers=(LGH LELBOW)
        BodyScale humerus_l: axes=(X Y Z)
      Measurement lowerarm_l: apply=true
        MarkerPair: markers=(LELBOW LWRIST)
        BodyScale ulna_l: axes=(X Y Z)
        BodyScale radius_l: axes=(X Y Z)
        BodyScale hand_l: axes=(X Y Z)
      Measurement foot_r_x: apply=true
        MarkerPair: markers=(Pro_MidPnt_R_Mal Pro_MidPnt_R_MTP)
        BodyScale calcn_r: axes=X
        BodyScale toes_r: axes=X
      Measurement foot_r_y: apply=true
        MarkerPair: markers=(Pro_MidPnt_R_Mal V_MidPnt_R_Mal)
        BodyScale calcn_r: axes=Y
        BodyScale toes_r: axes=Y
      Measurement foot_r_z: apply=true
        MarkerPair: markers=(V_R5MTP V_R1MTP)
        BodyScale calcn_r: axes=Z
        BodyScale toes_r: axes=Z
      Measurement foot_l_x: apply=true
        MarkerPair: markers=(Pro_MidPnt_L_Mal Pro_MidPnt_L_MTP)
        BodyScale calcn_l: axes=X
        BodyScale toes_l: axes=X
      Measurement foot_l_y: apply=true
        MarkerPair: markers=(Pro_MidPnt_L_Mal V_MidPnt_L_Mal)
        BodyScale calcn_l: axes=Y
        BodyScale toes_l: axes=Y
      Measurement foot_l_z: apply=true
        MarkerPair: markers=(V_L5MTP V_L1MTP)
        BodyScale calcn_l: axes=Z
        BodyScale toes_l: axes=Z
      Measurement torso_x: apply=true
        MarkerPair: markers=(V_MidPnt_SIAS V_MidPnt_SIPS)
        BodyScale torso: axes=X
      Measurement torso_y: apply=true
        MarkerPair: markers=(V_MidPnt_Pelvis C7)
        BodyScale torso: axes=Y
      Measurement torso_z: apply=true
        MarkerPair: markers=(RGH LGH)
        BodyScale torso: axes=Z
  MarkerPlacer:
    apply: true
    marker_file: Static.trc
    time_range: 0 3.73333
    output_motion_file: static_output.mot
    output_model_file: scaled_weighted_matlab.osim
    output_marker_file: MarkerSet_after_scale.xml
    max_marker_movement: -1
    IKTaskSet:
      IKMarkerTask STERNUM: apply=false weight=50
      IKMarkerTask C7: apply=false weight=50
      IKMarkerTask RGH: apply=true weight=10
      IKMarkerTask LGH: apply=true weight=10
      IKMarkerTask RFRONTAL: apply=false weight=10
      IKMarkerTask LFRONTAL: apply=false weight=10
      IKMarkerTask ROCCIPUT: apply=false weight=10
      IKMarkerTask LOCCIPUT: apply=false weight=10
      IKMarkerTask RASIS: apply=true weight=50
      IKMarkerTask LASIS: apply=true weight=50
      IKMarkerTask RPSIS: apply=true weight=50
      IKMarkerTask LPSIS: apply=true weight=50
      IKMarkerTask V_MidPnt_SIAS: apply=true weight=200
      IKMarkerTask V_MidPnt_SIPS: apply=true weight=200
      IKMarkerTask V_MidPnt_Pelvis: apply=true weight=200
      IKMarkerTask V_MidPnt_Hip: apply=true weight=200
      IKMarkerTask V_Right_Hip: apply=true weight=200
      IKMarkerTask RAT: apply=false weight=1
      IKMarkerTask RLT: apply=false weight=1
      IKMarkerTask RDAT: apply=false weight=1
      IKMarkerTask RLE: apply=true weight=50
      IKMarkerTask RME: apply=true weight=50
      IKMarkerTask V_MidPnt_R_Knee: apply=true weight=200
      IKMarkerTask RTT: apply=false weight=1
      IKMarkerTask RFH: apply=false weight=1
      IKMarkerTask RT: apply=false weight=1
      IKMarkerTask RF: apply=false weight=1
      IKMarkerTask RLM: apply=true weight=50
      IKMarkerTask RMM: apply=true weight=50
      IKMarkerTask V_MidPnt_R_Mal: apply=true weight=200
      IKMarkerTask RMC: apply=true weight=50
      IKMarkerTask RMEDC: apply=false weight=1
      IKMarkerTask RLC: apply=false weight=1
      IKMarkerTask R5MTP: apply=false weight=50
      IKMarkerTask R1MTP: apply=false weight=1
      IKMarkerTask V_Left_Hip: apply=true weight=200
      IKMarkerTask LAT: apply=false weight=1
      IKMarkerTask LLT: apply=false weight=1
      IKMarkerTask LDAT: apply=false weight=1
      IKMarkerTask LLE: apply=true weight=50
      IKMarkerTask LME: apply=true weight=50
      IKMarkerTask V_MidPnt_L_Knee: apply=true weight=200
      IKMarkerTask LTT: apply=false weight=1
      IKMarkerTask LFH: apply=false weight=1
      IKMarkerTask LT: apply=false weight=1
      IKMarkerTask LF: apply=false weight=1
      IKMarkerTask LLM: apply=true weight=50
      IKMarkerTask LMM: apply=true weight=50
      IKMarkerTask V_MidPnt_L_Mal: apply=true weight=200
      IKMarkerTask LMC: apply=true weight=50
      IKMarkerTask LMEDC: apply=false weight=1
      IKMarkerTask LLC: apply=false weight=1
      IKMarkerTask L5MTP: apply=false weight=50
      IKMarkerTask L1MTP: apply=false weight=1
      IKMarkerTask T6: apply=false weight=1
      IKMarkerTask V_MidPnt_L_MTP: apply=true weight=100
      IKMarkerTask V_MidPnt_R_MTP: apply=true weight=100
      IKMarkerTask LELBOW: apply=true weight=10
      IKMarkerTask LWRIST: apply=true weight=10
      IKMarkerTask RELBOW: apply=true weight=10
      IKMarkerTask RWRIST: apply=true weight=10
