# OpenSim document version 40000
MarkerSet:
  Marker LA1: humerus_l (-0.02163863 -0.1138126 -0.02623364)
  Marker LA2: humerus_l (-0.0183912 -0.1946981 -0.02108236)
  Marker LA3: humerus_l (0.03031351 -0.152525 -0.01840731)
  Marker RA1: humerus_r (-0.0216386 -0.113813 0.0262336)
  Marker RA2: humerus_r (-0.0183912 -0.194698 0.0210824)
  Marker RA3: humerus_r (0.0303135 -0.152525 0.0184073)
  Marker RFORE1: radius_r (-0.02205119 -0.0727734 -0.0349809)
  Marker RFORE2: radius_r (-0.03608756 -0.1763613 -0.01513575)
  Marker RFORE3: radius_r (-0.02224818 -0.1262182 0.02481764)
  Marker LFORE1: radius_l (-0.0220512 -0.0727734 0.0349809)
  Marker LFORE2: radius_l (-0.05078565 -0.1763607 0.01513589)
  Marker LFORE3: radius_l (-0.02224824 -0.1378296 -0.0248177)
  Marker STERNUM: torso (0.09949372 0.2273967 0)
  Marker C7: torso (-0.07284298 0.4133403 0)
  Marker RGH: torso (-0.001466615 0.4240088 0.1355129)
  Marker LGH: torso (0 0.4213606 -0.140844)
  Marker RFRONTAL: torso (0.073 0.61 0.05)
  Marker LFRONTAL: torso (0.073 0.61 -0.05)
  Marker ROCCIPUT: torso (-0.0725 0.58 0.05)
  Marker LOCCIPUT: torso (-0.0725 0.58 -0.05)
  Marker RASIS: pelvis (0.01 0.01 0.124)
  Marker LASIS: pelvis (0.01 0.01 -0.124)
  Marker RPSIS: pelvis (-0.153551 0.042 0.0450304)
  Marker LPSIS: pelvis (-0.153551 0.042 -0.0450304)
  Marker V_MidPnt_SIAS: pelvis (0.01 0.01 0) fixed=true
  Marker V_MidPnt_SIPS: pelvis (-0.153551 0.042 0) fixed=true
  Marker V_MidPnt_Pelvis: pelvis (-0.07 0.026 0) fixed=true
  Marker V_MidPnt_Hip: pelvis (-0.0707 -0.0661 0) fixed=true
  Marker V_Right_Hip: femur_r_offset (0 0 0) fixed=true
  Marker RAT: femur_r (0.065 -0.17 0.02010354)
  Marker RLT: femur_r (-0.001339499 -0.17 0.064)
  Marker RDAT: femur_r (0.065 -0.2639057 0.01861815)
  Marker RLE: femur_r (0 -0.404 0.05)
  Marker RME: femur_r (0 -0.404 -0.05)
  Marker V_MidPnt_R_Knee: femur_r (0 -0.404 0) fixed=true
  Marker RTT: tibia_r (0.05157355 -0.0696878 0.01040162)
  Marker RFH: tibia_r (-0.01776353 -0.05612557 0.05305035)
  Marker RT: tibia_r (0.02099833 -0.2809902 -0.002290133)
  Marker RF: tibia_r (-0.006193534 -0.2152085 0.05000016)
  Marker RLM: tibia_r (-0.01928999 -0.3864041 0.04458304)
  Marker RMM: tibia_r (0.005998276 -0.3838884 -0.03806471)
  Marker V_MidPnt_R_Mal: tibia_r (0.0004990011 -0.3871222 6.01662e-5) fixed=true
  Marker RMC: calcn_r (-0.01999989 0.01899999 -0.007109428)
  Marker RMEDC: calcn_r (0.0175461 0.025 -0.0388165)
  Marker RLC: calcn_r (0.0221 0.025 0.0307541)
  Marker R5MTP: calcn_r (0.1461674 0.005473053 0.05541743)
  Marker R1MTP: calcn_r (0.1815791 0.01841876 -0.02819538)
  Marker V_Left_Hip: femur_l_offset (0 0 0) fixed=true
  Marker LAT: femur_l (0.065 -0.17 -0.01860756)
  Marker LLT: femur_l (0.01283517 -0.17 -0.05601023)
  Marker LDAT: femur_l (0.065 -0.2480359 -0.01160566)
  Marker LLE: femur_l (0 -0.404 -0.05)
  Marker LME: femur_l (0 -0.404 0.05)
  Marker V_MidPnt_L_Knee: femur_l (0 -0.404 0) fixed=true
  Marker LTT: tibia_l (0.04980585 -0.07203588 -0.008237422)
  Marker LFH: tibia_l (-0.0113969 -0.05831745 -0.05077789)
  Marker LT: tibia_l (0.02764694 -0.2814855 -0.005830479)
  Marker LF: tibia_l (-0.009428166 -0.2117921 -0.0500001)
  Marker LLM: tibia_l (-0.01180465 -0.3795042 -0.04784259)
  Marker LMM: tibia_l (-0.004398664 -0.3786762 0.03816501)
  Marker V_MidPnt_L_Mal: tibia_l (0.000499697 -0.3781685 -0.0005747018) fixed=true
  Marker LMC: calcn_l (-0.01999993 0.01986331 0.004396022)
  Marker LMEDC: calcn_l (0.01754586 0.01613387 0.0388165)
  Marker LLC: calcn_l (0.02209986 0.01851047 -0.030754)
  Marker L5MTP: calcn_l (0.146167 0.0140679 -0.0555596)
  Marker L1MTP: calcn_l (0.181579 0.0184188 0.02634877)
  Marker T6: torso (-0.1087639 0.2727872 0.001067296)
  Marker V_MidPnt_L_MTP: calcn_l (0.1641151 0.02116895 -0.01339401) fixed=true
  Marker V_MidPnt_R_MTP: calcn_r (0.164172 0.01466603 0.008775961) fixed=true
  Marker LELBOW: humerus_l (0.01506551 -0.2784353 -0.03398996)
  Marker LWRIST: ulna_l (-0.02174657 -0.236309 -0.006852849)
  Marker RELBOW: humerus_r (0.006751093 -0.277001 0.03515626)
  Marker RWRIST: ulna_r (-0.02590262 -0.2356973 0.00473784)
  Marker V_LMM: tibia_l (0.005998997 -0.4723561 0.0324118)
  Marker V_LLM: tibia_l (-0.005001652 -0.4692918 -0.0526991)
  Marker Pro_MidPnt_L_Mal: tibia_l (0.0004997364 -0.4722612 -0.00836114)
  Marker V_LMC: calcn_l (-0.0199999 -0.02490143 0.00439602)
  Marker V_LMEDC: calcn_l (0.01754586 -0.0280503 0.0388165)
  Marker V_LLC: calcn_l (0.0221 -0.02891095 -0.0307541)
  Marker Pro_MidPnt_L_MTP: calcn_l (0.164115 -0.0249013 -0.013394)
  Marker V_L5MTP: calcn_l (0.146167 -0.0249013 -0.05556)
  Marker V_L1MTP: calcn_l (0.181579 -0.0249013 0.0263488)
  Marker V_RMM: tibia_r (0.005997924 -0.4704427 -0.0297437)
  Marker V_RLM: tibia_r (-0.00500256 -0.4727272 0.043853)
  Marker Pro_MidPnt_R_Mal: tibia_r (0.0004987573 -0.4730793 0.0068604)
  Marker V_RMC: calcn_r (-0.0199999 -0.02490143 -0.01075804)
  Marker V_RMEDC: calcn_r (0.01754586 -0.0249013 -0.0400054)
  Marker V_RLC: calcn_r (0.02209986 -0.0249013 0.034523)
  Marker Pro_MidPnt_R_MTP: calcn_r (0.164115 -0.0249013 0.01106744)
  Marker V_R5MTP: calcn_r (0.146167 -0.0249013 0.0568715)
  Marker V_R1MTP: calcn_r (0.181579 -0.0249013 -0.02773708)
  Marker XYPHOID: torso (0.0445484 0.369401 0)
  Marker RT3: femur_r (0.06401809 -0.3257303 0.01197749)
  Marker LT3: femur_l (0.0640181 -0.32573 -0.004411814)
  Marker toe_right: toes_r (0.06612188 0.0106539 -0.01808627)
  Marker toe_left: toes_l (0.0627927 0.01062993 0.01916232)
